// COMSOL Multiphysics 6.2.0.415 model "modèle3D.mph"
// Outline of the model tree

Parameters
  Wx = 0.03[m]  // largeur du tube (direction x)
  Wy = 0.03[m]  // largeur du tube (direction y)
  D12 = 20[mm]  // distance entre les deux microphones
  D23 = 35[mm]  // distance entre le deuxième microphone et le domaine thermo-visqueux
  D3S = 5[mm]  // distance entre le domaine thermovisqueux et la solution
  t = 0.002  // épaisseur de la première plaque

Variables
  var1 "Variables 1"
    co = 348.9679  // Vitesse du son
    cp = 0.24263  // Capacité thermique à pression constante
    kappa = 6.1686e-06  // Conductivité thermique
    neta = 1.8496e-05  // Viscositéé dynamique
    rho0 = 1.2414  // Masse volumique de l'air
    gamma = 1.4003  // Masse volumique de l'air

Selections
  box_tube: Box "Boîte" | entitydim = 3; zmin = D3S - 0.01[mm]; condition = inside
  box_mat: Box "Boîte 2" | entitydim = 3; zmax = D3S + 0.01[mm]; condition = inside
  box_src: Box "Boîte 3" | entitydim = 2; zmin = D12+D23+D3S-0.01[mm]; zmax = D12+D23+D3S+0.01[mm]; condition = inside
  box_mic: Box "Boîte 4" | entitydim = 2; zmin = D23+D3S-0.01[mm]; zmax = D23+D3S+0.01[mm]; condition = inside
  box_bnd_tva: Box "Boîte 5" | entitydim = 2; zmin = D3S-0.01[mm]; zmax = D3S+0.01[mm]
  box_bnd_lyr: Box "Boîte 6" | entitydim = 2; zmax = D3S + 0.01[mm]; condition = inside
  box3: Box "holes" | entitydim = 3; xmin = -Wx/2 + 0.01[mm]; zmin = -(t + 0.01[mm]); zmax = 0.01[mm]; condition = inside
  dif4: Difference "material without holes" | entitydim = 3; add = {box_mat}; subtract = {box3}
  box2: Box "holes faces"
    entitydim = 2
    xmin = -Wx/2 + 0.01[mm]
    zmin = -(t + 0.01[mm])
    zmax = 0.01[mm]
    condition = inside
  box1: Box "holes side faces" | entitydim = 2; zmin = -t + 0.01[mm]; zmax = -0.01[mm]
  dif1: Difference "holes top and bottom faces" | entitydim = 2; add = {box2}; subtract = {box1}
  box4: Box "MPP faces" | entitydim = 2; zmin = -(t + 0.01[mm]); zmax = 0.01[mm]; condition = inside
  dif2: Difference "plate faces" | entitydim = 2; add = {box4}; subtract = {box2}
  box5: Box "holes edges"
    entitydim = 1
    xmin = -Wx/2 + 0.01[mm]
    ymin = -Wy/2 + 0.01[mm]
    zmin = -(t + 0.01[mm])
    zmax = 0.01[mm]
    condition = inside
  box6: Box "holes side edges" | entitydim = 1; zmin = -t + 0.01[mm]; zmax = -0.01[mm]
  dif3: Difference "holes top and bottom edges" | entitydim = 1; add = {box5}; subtract = {box6}

Geometry
  geom1 "Géométrie 1" (3D, length unit m)
    blk1: Block "Bloc 1" | pos = {-Wx/2, -Wy/2, D23 + D3S}; size = {Wx, Wy, D12}
    blk2: Block "Bloc 2" | pos = {-Wx/2, -Wy/2, D3S}; size = {Wx, Wy, D23}
    blk3: Block "Bloc 3" | pos = {-Wx/2, -Wy/2, 0}; size = {Wx, Wy, D3S}
    cyl1: Cylinder "Cylindre 1" | pos = {-0.0072473, -Wy/2 + 0.006, -0.002}; r = 0.00037361; h = 0.002
    arr1: Array "Réseau 1" | input = cyl1; size = {3, 4, 1}; fullsize = {3, 4, 1}; displ = {0.0072473, 0.006, 0}
    bc1: Block "Bloc 1a" | pos = {-Wx/2, -Wy/2, -0.05}; size = {Wx, Wy, 0.048}
    bf2: Block "Bloc 2a" | pos = {-0.0020117, -0.015, -0.052}; size = {0.0020117, 0.03, 0.002}
    bc3: Block "Bloc 3a" | pos = {-0.015, -0.015, -0.1}; size = {0.03, 0.03, 0.048}
    fin: Finalize "Constituer une union"

Materials
  mat1: Common "Air" on all domains
    def "Basique"
      thermalexpansioncoefficient = alpha_p(pA,T)
      molarmass = 0.02897[kg/mol]
      bulkviscosity = muB(T)
      relpermeability = 1
      relpermittivity = 1
      dynamicviscosity = eta(T)
      ratioofspecificheat = 1.4
      electricconductivity = 0[S/m]
      heatcapacity = Cp(T)
      density = rho(pA,T)
      thermalconductivity = k(T)
      soundspeed = cs(T)
      eta: Piecewise "Définie par morceaux" | arg = T; pieces = {200.0, 1600.0, -8.38278E-7+8.35717342E-8*T^1-7.69429583E-11*T^2+4.6437266E-14*T^3-1.06585607E-17*T^4}; argunit = K; fununit = Pa*s
      Cp: Piecewise "Définie par morceaux 2" | arg = T; pieces = {200.0, 1600.0, 1047.63657-0.372589265*T^1+9.45304214E-4*T^2-6.02409443E-7*T^3+1.2858961E-10*T^4}; argunit = K; fununit = J/(kg*K)
      rho: Analytic "Analytique" | expr = pA*0.02897/R_const[K*mol/J]/T; args = {pA, T}; fununit = kg/m^3; argunit = {Pa, K}
      k: Piecewise "Définie par morceaux 3" | arg = T; pieces = {200.0, 1600.0, -0.00227583562+1.15480022E-4*T^1-7.90252856E-8*T^2+4.11702505E-11*T^3-7.43864331E-15*T^4}; argunit = K; fununit = W/(m*K)
      cs: Analytic "Analytique 2" | expr = sqrt(1.4*R_const[K*mol/J]/0.02897*T); args = T; fununit = m/s; argunit = K
      an1: Analytic "Analytique 1" | funcname = alpha_p; expr = -1/rho(pA,T)*d(rho(pA,T),T); args = {pA, T}; fununit = 1/K; argunit = {Pa, K}
      an2: Analytic "Analytique 2a" | funcname = muB; expr = 0.6*eta(T); args = T; fununit = Pa*s; argunit = K
    RefractiveIndex "Indice de réfraction"
      n = 1
      ki = 0
    NonlinearModel "Modèle non-linéaire"
      BA = (def.gamma+1)/2
    idealGas "Gaz idéal"
      Rs = R_const/Mn
      heatcapacity = Cp(T)
      ratioofspecificheat = 1.4
      molarmass = 0.02897
      Cp: Piecewise | arg = T; pieces = {200.0, 1600.0, 1047.63657-0.372589265*T^1+9.45304214E-4*T^2-6.02409443E-7*T^3+1.2858961E-10*T^4}; argunit = K; fununit = J/(kg*K)

Physics
  acpr: PressureAcoustics "Pression acoustique, domaine fréquentiel" on selection box_tube
    dependent variable p
    fpam1: FrequencyPressureAcousticsModel "Pression acoustique 1" (default)
    shb1: SoundHard "Frontière acoustique rigide 1" (default)
    init1: init "Valeurs initiales 1" (default)
    pr1: Pressure "Pression 1" on selection box_src | p0 = 1
  ta: ThermoacousticsSinglePhysics "Acoustique thermovisqueuse, domaine fréquentiel" on selection box_mat
    dependent variable p2
    tam1: ThermoviscousAcousticsModel "Modèle d'acoustique thermovisqueuse 1" (default)
    wall1: Wall "Paroi 1" (default)
    init1: init "Valeurs initiales 1" (default)

Multiphysics
  atb1: AcousticThermoacousticBoundary "Frontière acoustique-acoustique thermovisqueuse 1" on selection box_bnd_tva
    Acoustics_physics = acpr
    Thermoacoustics_physics = ta

Mesh
  mesh1 "Maillage 1"
    size: MeshSizeDefault "Taille" | hauto = 8
    ftet1: FreeTet "Maillage tetraedrique du tube" on selection box_tube
    bl1: BndLayer "Maillage annulaire dans les perforations" on selection box3
      blp: BndLayerProp "Propriétés de couche limite" on selection box1 | blnlayers = 4; blhtot = 0.0005
    bl6: BndLayer "Maillage longitudinale dans les perforations" on selection box3
      blp: BndLayerProp "Propriétés de couche limite" on selection dif1 | blnlayers = 2; blhtot = 1[mm]
    bl3: BndLayer "Mailllage annulaire autour des perforations" on selection dif2
      blp: BndLayerProp "Propriétés de couche limite" on selection dif3 | blnlayers = 4; blhtot = 0.0005
    ftet2: FreeTet "Maillage tetraedrique du materiau" on selection dif4

Studies
  std1 "Etude 1"
    freq: Frequency "Domaine fréquentiel"
      plist = {1, 26.120603, 51.241206, 76.361809, 101.48241, 126.60302, 151.72362, 176.84422, 201.96482, 227.08543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}

Solver configurations
  sol1 "Solution 1" (study std1)
    v1: Variables "Dependent Variables 1.1"
    s1: Stationary "Stationary Solver 1.1"
      fc1: FullyCoupled
      p1: Parametric
        pname = freq
        plistarr = 1 26.120603 51.241206 76.361809 101.48241 126.60302 151.72362 176.84422 201.96482 227.08543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
        punit = Hz
        pcontinuationmode = no
      d1: Direct | linsolver = pardiso; pivotperturb = 1.0E-13

Datasets
  dset1: Solution | solution = sol1